New Capacitor.p13uc0 bus1=p13udt17984 phases=3 Kv=12.47 conn=Wye Kvar=600.0

New CapControl.p13uc0 Capacitor=p13uc0 Element=Line.l(r:p13udt17980-p13udt17984) Terminal=1 delay=100.0 Type=voltage Vmin=120.5 Vmax=125.0 Ptratio=59.99631547328862 Ctratio=100.0

New Capacitor.p13uc3 bus1=p13udt18490 phases=3 Kv=12.47 conn=Wye Kvar=450.0

New CapControl.p13uc3 Capacitor=p13uc3 Element=Line.padswitch(r:p13udt18490-p13umv66)p13u_148912 Terminal=1 delay=100.0 Type=voltage Vmin=120.5 Vmax=125.0 Ptratio=59.99631547328862 Ctratio=100.0
