New Capacitor.p13uc1 bus1=p13udt18369 phases=3 Kv=12.47 conn=Wye Kvar=450.0

New CapControl.p13uc1 Capacitor=p13uc1 Element=Line.l(r:p13udt18369-p13udt18370) Terminal=1 delay=100.0 Type=voltage Vmin=120.5 Vmax=125.0 Ptratio=59.99631547328862 Ctratio=100.0
