New Storage.storage_sb2_p13uhs12_1247_node_2_11 phases=3 bus1=sb2_p13uhs12_1247_node_2_11.1.2.3 kV=12.47 kVA=1100.0 kWRated=1000.0 kWhRated=2000.0 kWhStored=1000.0 State=IDLING %EffCharge=95.0 %EffDischarge=95.0
New Storage.storage_sb2_p13uhs12_1247_node_2_11_1 phases=3 bus1=sb2_p13uhs12_1247_node_2_11.1.2.3 kV=12.47 kVA=1100.0 kWRated=1000.0 kWhRated=2000.0 kWhStored=1000.0 State=IDLING %EffCharge=95.0 %EffDischarge=95.0
New Storage.storage_sb2_p13uhs12_1247_node_2_11_2 phases=3 bus1=sb2_p13uhs12_1247_node_2_11.1.2.3 kV=12.47 kVA=1100.0 kWRated=1000.0 kWhRated=2000.0 kWhStored=1000.0 State=IDLING %EffCharge=95.0 %EffDischarge=95.0
