New Capacitor.p13uc72 bus1=p13udt27631 phases=3 Kv=12.47 conn=Wye Kvar=300.0

New CapControl.p13uc72 Capacitor=p13uc72 Element=Line.l(r:p13udt27631-p13udt27659) Terminal=1 delay=100.0 Type=voltage Vmin=120.5 Vmax=125.0 Ptratio=59.99631547328862 Ctratio=100.0
